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/batch
! ANSYS input file written by Workbench version 2022 R1
! File used for geometry attach: C:\Users\Dharshan K\AppData\Local\Temp\WB_Dharshan K_12616_2\wbnew_files\dp0\SYS\DM\SYS.scdoc
/title,wbnew--Static Structural (A5)
/com,--- Data in consistent MKS units. See Solving Units in the help system for more information.
/units,MKS
/prep7
! Turn off shape checking because checks already performed inside WB mesher.
! See help system for more information.
SHPP,OFF,,NOWARN
etcon,set             ! allow ANSYS to choose best KEYOP's for 180x elements, resets any applicable keyopt to MAPDL defaults
/com,*********** Nodes for the whole assembly ***********
nblock,3,,20860
(1i9,3e20.9e3)
        1    -1.144569877E-03     6.291269398E-02    -3.692307692E-02
        2    -1.144569877E-03     6.291269398E-02    -3.384615385E-02
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-1
/com,*********** Elements for Body 1 "Part1\PartBody/Hole.1" ***********
et,1,187
eblock,19,solid,,2932
(19i9)
        1        1        1        1        0        0        0        0       10        0     1223     6677     6702     6921     6729    10770    10918    10777    10772
    10913    11004
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-1
/com,*********** Elements for Body 2 "Part2\PartBody/Hole.1" ***********
et,2,187
eblock,19,solid,,4117
(19i9)
        2        2        2        2        0        0        0        0       10        0     4155    12635    12731    12786    12765    18563    18942    18565    18564
    18941    18962
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-1
/com,*********** Elements for Body 3 "Part3\PartBody/Pad.1" ***********
et,3,186
keyo,3,2,1          ! set full integration on SOLID186
eblock,19,solid,,1222
(19i9)
        3        3        3        3        0        0        0        0       20        0        1       51      326      851      601      960      949      928      938
     1848     3059     3970     1849     4699     4640     4638     4677     1850     3060     4479     3971
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-1
/com,*********** Send User Defined Coordinate System(s) ***********
csys,0
toffst,273.15,  ! Temperature offset from absolute zero
/com,*********** Set Reference Temperature ***********
tref,22.
/com,*********** Send Materials ***********
MP,EX,1,200000000000,	! Pa
MP,NUXY,1,0.266,
MP,DENS,1,7860,	! kg m^-3
MP,ALPX,1,7.88860905221012e-31,	! C^-1
MP,C,1,7.88860905221012e-31,	! J kg^-1 C^-1
MP,KXX,1,7.88860905221012e-31,	! W m^-1 C^-1

MP,EX,2,200000000000,	! Pa
MP,NUXY,2,0.266,
MP,DENS,2,7860,	! kg m^-3
MP,ALPX,2,7.88860905221012e-31,	! C^-1
MP,C,2,7.88860905221012e-31,	! J kg^-1 C^-1
MP,KXX,2,7.88860905221012e-31,	! W m^-1 C^-1

MP,EX,3,200000000000,	! Pa
MP,NUXY,3,0.266,
MP,DENS,3,7860,	! kg m^-3
MP,ALPX,3,7.88860905221012e-31,	! C^-1
MP,C,3,7.88860905221012e-31,	! J kg^-1 C^-1
MP,KXX,3,7.88860905221012e-31,	! W m^-1 C^-1

!************************* Model Summary ********************
!Part1\PartBody/Hole.1,	Light Green,	matid,	1
!Part2\PartBody/Hole.1,	Fire Red,	matid,	2
!Part3\PartBody/Pad.1,	DS Yellow,	matid,	3
!************************* End Model Summary ********************
/com,*********** Create Contact "No Separation - Part2\PartBody/Hole.1 To Part1\PartBody/Hole.1" ***********
*set,tid,5
*set,cid,4
r,tid
r,cid
et,tid,170
et,cid,174
eblock,10,,,284
(15i9)
    12248        5        5        5        0    12222    12246    12280    12280    16374    16497    12280    16376
    12249        5        5        5        0    12206    12271    12285    12285    16243    16595    12285    16244
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-1
eblock,10,,,284
(15i9)
    12532        4        4        4        0    12222    12246    12280    12280    16374    16497    12280    16376
    12533        4        4        4        0    12206    12271    12285    12285    16243    16595    12285    16244
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-1
eblock,10,,,132
(15i9)
    12816        4        5        4        0     6516     6529     6542     6542     9859     9939     6542     9861
    12817        4        5        4        0     6526     6515     6538     6538     9849     9853     6538     9924
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-1
eblock,10,,,132
(15i9)
    12948        5        4        5        0     6516     6529     6542     6542     9859     9939     6542     9861
    12949        5        4        5        0     6526     6515     6538     6538     9849     9853     6538     9924
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-1
keyo,cid,8,2               ! auto create asymmetric contact (from Program Controlled setting)
keyo,cid,10,0              ! adjust contact stiffness each NR iteration (from Program Controlled setting)
keyo,cid,12,4              ! no separation always
keyo,cid,18,1              ! small sliding turned on by application
keyo,cid,2,0               ! augmented Lagrange (from Program Controlled setting)
keyo,cid,4,0               ! on Gauss point (from Program Controlled setting)
keyo,cid,9,1               ! ignore initial gaps/penetration
keyo,cid,7,0               ! No Prediction
rmod,tid,3,10.      ! FKN
rmod,tid,5,0.       ! ICONT
rmod,tid,6,0.       ! PINB
rmod,tid,10,0.      ! CNOF
rmod,tid,12,0.      ! FKT
rmod,tid,36,49      ! WB DSID
rmod,cid,3,10.      ! FKN
rmod,cid,5,0.       ! ICONT
rmod,cid,6,0.       ! PINB
rmod,cid,10,0.      ! CNOF
rmod,cid,12,0.      ! FKT
rmod,cid,36,49      ! WB DSID
/com,*********** Create Contact "No Separation - Part3\PartBody/Pad.1 To Part1\PartBody/Hole.1" ***********
*set,tid,7
*set,cid,6
r,tid
r,cid
et,tid,170
et,cid,174
eblock,10,,,572
(15i9)
    13080        7        7        7        0     1308     1334     1584     1283     5429     5481     5380     5379
    13081        7        7        7        0     1307     1344     1334     1308     5428     5480     5429     5427
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-1
eblock,10,,,572
(15i9)
    13652        6        6        6        0     1308     1334     1584     1283     5429     5481     5380     5379
    13653        6        6        6        0     1307     1344     1334     1308     5428     5480     5429     5427
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-1
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eblock,10,,,56
(15i9)
    14280        7        6        7        0     5966     5965     6375     6375     6936     6938     6375     6943
    14281        7        6        7        0     5965     5963     5972     5972     6922     6923     5972     6937
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-1
keyo,cid,8,2               ! auto create asymmetric contact (from Program Controlled setting)
keyo,cid,10,0              ! adjust contact stiffness each NR iteration (from Program Controlled setting)
keyo,cid,12,4              ! no separation always
keyo,cid,18,1              ! small sliding turned on by application
keyo,cid,2,0               ! augmented Lagrange (from Program Controlled setting)
keyo,cid,4,0               ! on Gauss point (from Program Controlled setting)
keyo,cid,9,1               ! ignore initial gaps/penetration
keyo,cid,7,0               ! No Prediction
rmod,tid,3,10.      ! FKN
rmod,tid,5,0.       ! ICONT
rmod,tid,6,0.       ! PINB
rmod,tid,10,0.      ! CNOF
rmod,tid,12,0.      ! FKT
rmod,tid,36,52      ! WB DSID
rmod,cid,3,10.      ! FKN
rmod,cid,5,0.       ! ICONT
rmod,cid,6,0.       ! PINB
rmod,cid,10,0.      ! CNOF
rmod,cid,12,0.      ! FKT
rmod,cid,36,52      ! WB DSID
/com,*********** Create Contact "No Separation - Part3\PartBody/Pad.1 To Part2\PartBody/Hole.1" ***********
*set,tid,9
*set,cid,8
r,tid
r,cid
et,tid,170
et,cid,174
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eblock,10,,,152
(15i9)
    15632        9        8        9        0    11624    11625    12053    12053    12950    12961    12053    12953
    15633        9        8        9        0    11623    12063    12052    12052    12945    15285    12052    12944
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-1
keyo,cid,8,2               ! auto create asymmetric contact (from Program Controlled setting)
keyo,cid,10,0              ! adjust contact stiffness each NR iteration (from Program Controlled setting)
keyo,cid,12,4              ! no separation always
keyo,cid,18,1              ! small sliding turned on by application
keyo,cid,2,0               ! augmented Lagrange (from Program Controlled setting)
keyo,cid,4,0               ! on Gauss point (from Program Controlled setting)
keyo,cid,9,1               ! ignore initial gaps/penetration
keyo,cid,7,0               ! No Prediction
rmod,tid,3,10.      ! FKN
rmod,tid,5,0.       ! ICONT
rmod,tid,6,0.       ! PINB
rmod,tid,10,0.      ! CNOF
rmod,tid,12,0.      ! FKT
rmod,tid,36,56      ! WB DSID
rmod,cid,3,10.      ! FKN
rmod,cid,5,0.       ! ICONT
rmod,cid,6,0.       ! PINB
rmod,cid,10,0.      ! CNOF
rmod,cid,12,0.      ! FKT
rmod,cid,36,56      ! WB DSID
nsel,all
esel,all
/com,*********** Fixed Supports ***********
CMBLOCK,_FIXEDSU,NODE,       85
(8i10)
      6019      6049      6050      6051      6144      6145      6146      6147
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cmsel,s,_FIXEDSU
d,all,all
nsel,all
/com,*********** Define Pressure Vector Using Surface Effect Elements ***********
local,12,0,0.,0.,0.,0.,0.,0.
csys,0
et,10,154
eblock,10,,,126
(15i9)
    15784       10       10       10       12    12431    12440    12452    12452    17425    17493    12452    17427
    15785       10       10       10       12    12434    12442    12452    12452    17443    17506    12452    17446
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-1
esel,s,type,,10
keyop,10,2,1                ! Apply load in local coordinate system
keyop,10,7,0                ! Use deformed area for application of load
esel,all
fini
/com,****************************************************************************
/com,*************************    SOLUTION       ********************************
/com,****************************************************************************
/solu
antype,0                   ! static analysis
_thickRatio=  1     ! Ratio of thick parts in the model
eqsl,pcg,1e-8,,,,,,1
cntr,print,1               ! print out contact info and also make no initial contact an error
dmpoption,emat,no             ! Don't combine emat file for DANSYS
dmpoption,esav,no             ! Don't combine esav file for DANSYS
nldiag,cont,iter           ! print out contact info each equilibrium iteration
rescontrol,,none                 ! Do not keep any restart files
/com,****************************************************
/com,******************* SOLVE FOR LS 1 OF 1 ****************
esel,s,type,,10
nsle
sfe,all,1,pres,1,0.
sfe,all,2,pres,1,1000000.
sfe,all,3,pres,1,0.
nsel,all
esel,all
nsub,1,1,1
time,1.
outres,erase
outres,all,none
outres,nsol,all,
outres,rsol,all
outres,eangl,all
outres,etmp,all
outres,veng,all
outres,strs,all,
outres,epel,all,
outres,eppl,all,
outres,cont,all,
! *********** WB SOLVE COMMAND ***********
! check interactive state
*get,ANSINTER_,active,,int
*if,ANSINTER_,ne,0,then
/eof
*endif
solve
/com *************** Write FE CONNECTORS *********
CEWRITE,file,ce,,INTE
/com,****************************************************
/com,*************** FINISHED SOLVE FOR LS 1 *************
*get,_PCGITER,active,,solu,cgiter
/post1
fini
